Wed Jan 24 00:32:48 UTC 2024
$PROBLEM PK MODEL ORAL ADMINISTRATION

  ; NUMBER OF COMPARTMENTS        : 1 OR 2 OR 3
  ;
  ; ABSORPTION                    : FIRST-ORDER (option of LAG TIME), ZERO-ORDER OR ZERO-ORDER FOLLOWED BY FIRST-ORDER
  ;
  ; ELIMINATION                   : FIRST-ORDER
  ;
  ; INTERINDIVIDUAL VARIABILITY   : ESTIMATE in all parameters or fixed in some of them to 15% CV.
  ;
  ; RESIDUAL ERROR FOR PLASMA OBS : PROPORTIONAL, ADDITIVE OR COMBINED

$INPUT C ID TIME TAD AMT EVID DV II ADDL DOSE DOSEREF DAY RATE

$DATA /projects/qcp/QCP_MODELING/OTHER/autoPK/automatization_popPK/DerivedData/toymodel_data_rate_dose.csv
  IGNORE=@

$SUBROUTINE ADVAN5

$MODEL
  NCOMP= 3
  COMP = (DEPOT, INITIALOFF)
  COMP = (CENTRAL , DEFDOSE)
  COMP = (PERIPH)

$PK
  ; Parameter definition

  TVCL=EXP(THETA(1))    ; CL
  TVV2= EXP(THETA(2))   ; V2
  TVKA=EXP(THETA(4))    ; KA
  TVV3=EXP(THETA(7)) ; V3
  TVQ=EXP(THETA(8)) ; Q

  ; MU Referencing
  MU_1  = LOG(TVCL) + LOG(DOSE/DOSEREF)*THETA(3)    ; CL
  MU_2  = LOG(TVV2) + 0    ; V2
  MU_3  = LOG(TVKA) + 0    ; KA
  MU_4  = LOG(TVV3) + LOG(DOSE/DOSEREF)*THETA(9)  ; V3
  MU_5  = LOG(TVQ) + LOG(DOSE/DOSEREF)*THETA(10) ; Q

  ; Parameter transformations
  CL   = EXP(MU_1 + ETA(1))  ; CL
  V2    = EXP(MU_2 + ETA(2)) ; V2
  KA   = EXP(MU_3 + ETA(3))  ; KA
  V3   = EXP(MU_4 + ETA(4)) ; V3
  Q   = EXP(MU_5 + ETA(5)) ; Q

  TVALAG2=EXP(THETA(11))
  MU_6  = LOG(TVALAG2) ; ALAG2
  ALAG2 = EXP(MU_6 + ETA(6))  ; ALAG2
  TVD2=EXP(THETA(12))
  MU_7  = LOG(TVD2) ; D2
  D2 = EXP(MU_7 + ETA(7))  ; D2

  ; Assigning expressions to match ADVAN5 parameterization
  k20 = CL/V2
  k20 = CL/V2
  k23 = Q/V2 ; k23
  k32 = Q/V3 ; k32

  F1 = 1   ; INPUT1
  S2 = V2 ; CP

$ERROR
  CP = A(2)/S2
  IPRED = CP
  IRES = DV - IPRED
  W = SQRT(THETA(5)**2 + (THETA(6)*IPRED)**2)
  IWRES = IRES/W
  Y = IPRED + W*ERR(1)

$THETA
  ; Model parameters
  (2.5)       ; CL ; L/h ; LOG
  7         ; V2 ; L ; LOG
  0.1 	; cov_CL  ;

  0 FIX 	; KA  ; 1/h ; LOG

  ; Error model parameters
  1.5 	 ; add_error
  (0, 0.2) 	 ; prop_error

  ; Additional model parameters
  5 	 ; V3 ; LOG
  2 	 ; Q ; LOG
  0.1 	; cov_V3  ;
  0.1 	; cov_Q  ;

  -1.2 	; ALAG2  ; h ; LOG

  -1.2 	; D2  ; h ; LOG

$OMEGA ;; search band
  0.1  ;  CL ; LOG
  0.1  ;  V2 ; LOG
  0 FIX ;  KA ; LOG

  0.1 	 ; V3 ; LOG
  0.1 	 ; Q ; LOG
  0.01 FIX 	 ; ALAG2 ; LOG

  0.01 FIX 	 ; D2 ; LOG

$SIGMA
  1 FIX

$ESTIMATION method = SAEM ISAMPLE = 2 NBURN = 1000 NITER = 500 RANMETHOD = 3S2P CTYPE = 3 CITER = 10 CALPHA = 0.05 CINTERVAL = 10 SEED = 234567 PRINT = 5 NOABORT INTERACTION
$ESTIMATION method = IMP ISAMPLE = 3000 EONLY = 1 NITER = 10 RANMETHOD = 3S2P NOABORT INTERACTION PRINT = 1 MAPITER = 0 SIGDIGITS = 3 NSIG = 3 SIGL = 9

$COVARIANCE UNCONDITIONAL MATRIX=R PRINT = E

;; Phenotype: ([('ODE', 1), ('OMEGAS_V3', 0), ('OMEGAS_Q', 0), ('OMEGAS_V4', 1), ('OMEGAS_Q2', 0), ('OMEGAS_D1', 1), ('OMEGAS_D2', 1), ('TLAG', 0), ('TLAG2', 1), ('ZERO_ORDER_ABS', 2), ('TRANSIT_COMP', 0), ('DOSE_COV_CL', 1), ('DOSE_COV_V2', 0), ('DOSE_COV_KA', 0), ('DOSE_COV_V3', 1), ('DOSE_COV_Q', 1), ('ERRORFIX', 0)])
;; Genotype: [1, 0, 0, 1, 0, 1, 1, 0, 1, 2, 0, 1, 0, 0, 1, 1, 0]
;; Num non-influential tokens: 0

NM-TRAN MESSAGES
 WARNINGS AND ERRORS (IF ANY) FOR PROBLEM    1
 (WARNING  2) NM-TRAN INFERS THAT THE DATA ARE POPULATION.
 (MU_WARNING 26) DATA ITEM(S) USED IN DEFINITION OF MU_(S) SHOULD BE CONSTANT FOR INDIV. REC.:
  DOSE DOSEREF

1NONLINEAR MIXED EFFECTS MODEL PROGRAM (NONMEM) VERSION 7.5.0
 ORIGINALLY DEVELOPED BY STUART BEAL, LEWIS SHEINER, AND ALISON BOECKMANN
 CURRENT DEVELOPERS ARE ROBERT BAUER, ICON DEVELOPMENT SOLUTIONS,
 AND ALISON BOECKMANN. IMPLEMENTATION, EFFICIENCY, AND STANDARDIZATION
 PERFORMED BY NOUS INFOSYSTEMS.
 PROBLEM NO.:         1
 PK MODEL ORAL ADMINISTRATION
 TOT. NO. OF OBS RECS:     1344
 TOT. NO. OF INDIVIDUALS:       96
 GENERAL LINEAR KINETICS MODEL (ADVAN5)
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 #TBLN:      1
 #METH: Stochastic Approximation Expectation-Maximization
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
 #TERM:
 STOCHASTIC PORTION WAS COMPLETED
 REDUCED STOCHASTIC PORTION WAS COMPLETED

 ETABAR IS THE ARITHMETIC MEAN OF THE ETA-ESTIMATES,
 AND THE P-VALUE IS GIVEN FOR THE NULL HYPOTHESIS THAT THE TRUE MEAN IS 0.

 ETABAR:         1.4897E-05  4.6055E-05  0.0000E+00 -3.3546E-05  6.5283E-05  4.1115E-06  7.8383E-06
 SE:             4.9354E-02  9.3108E-02  0.0000E+00  4.1214E-02  4.6200E-02  8.6905E-03  4.8750E-03
 N:                      96          96           0          96          96          96          96

 P VAL.:         9.9976E-01  9.9961E-01  1.0000E+00  9.9935E-01  9.9887E-01  9.9962E-01  9.9872E-01

 ETASHRINKSD(%)  1.3478E+00  3.4728E+00  0.0000E+00  1.7813E+01  1.8895E+01  1.4404E+01  5.1984E+01
 ETASHRINKVR(%)  2.6773E+00  6.8251E+00  0.0000E+00  3.2453E+01  3.4220E+01  2.6733E+01  7.6945E+01
 EBVSHRINKSD(%)  1.3478E+00  3.4673E+00  0.0000E+00  1.7827E+01  1.8881E+01  4.5875E+01  5.0502E+01
 EBVSHRINKVR(%)  2.6775E+00  6.8144E+00  0.0000E+00  3.2477E+01  3.4197E+01  7.0705E+01  7.5499E+01
 RELATIVEINF(%)  0.0000E+00  0.0000E+00  0.0000E+00  6.7022E+01  6.1396E+01  2.8700E+01  2.3228E+01
 EPSSHRINKSD(%)  1.4658E+01
 EPSSHRINKVR(%)  2.7168E+01


 TOTAL DATA POINTS NORMALLY DISTRIBUTED (N):         1344
 N*LOG(2PI) CONSTANT TO OBJECTIVE FUNCTION:    2470.1067772541601
 OBJECTIVE FUNCTION VALUE WITHOUT CONSTANT:    12046.674933025510
 OBJECTIVE FUNCTION VALUE WITH CONSTANT:       14516.781710279669
 REPORTED OBJECTIVE FUNCTION DOES NOT CONTAIN CONSTANT

 TOTAL EFFECTIVE ETAS (NIND*NETA):                           576
 NIND*NETA*LOG(2PI) CONSTANT TO OBJECTIVE FUNCTION:    1058.6171902517829
 OBJECTIVE FUNCTION VALUE WITHOUT CONSTANT:    12046.674933025510
 OBJECTIVE FUNCTION VALUE WITH CONSTANT:       13105.292123277293
 REPORTED OBJECTIVE FUNCTION DOES NOT CONTAIN CONSTANT


 #TERE:
 Elapsed estimation  time in seconds:   183.52
 Elapsed covariance  time in seconds:     0.02

 ********************                STOCHASTIC APPROXIMATION EXPECTATION-MAXIMIZATION               ********************
 #OBJT:**************                        FINAL VALUE OF LIKELIHOOD FUNCTION                      ********************
 #OBJV:********************************************    12046.675       **************************************************

 ********************                STOCHASTIC APPROXIMATION EXPECTATION-MAXIMIZATION               ********************
 ********************                             FINAL PARAMETER ESTIMATE                           ********************

 THETA - VECTOR OF FIXED EFFECTS PARAMETERS   *********
         TH 1      TH 2      TH 3      TH 4      TH 5      TH 6      TH 7      TH 8      TH 9      TH10      TH11      TH12
         3.15E+00  5.50E+00 -4.93E-01  0.00E+00  3.42E+00  2.17E-01  6.57E+00  4.23E+00 -6.06E-01 -7.47E-01 -1.02E+00  1.24E+00

 OMEGA - COV MATRIX FOR RANDOM EFFECTS - ETAS  ********
         ETA1      ETA2      ETA3      ETA4      ETA5      ETA6      ETA7
 ETA1
+        2.43E-01
 ETA2
+        0.00E+00  9.03E-01
 ETA3
+        0.00E+00  0.00E+00  0.00E+00
 ETA4
+        0.00E+00  0.00E+00  0.00E+00  2.44E-01
 ETA5
+        0.00E+00  0.00E+00  0.00E+00  0.00E+00  3.15E-01
 ETA6
+        0.00E+00  0.00E+00  0.00E+00  0.00E+00  0.00E+00  1.00E-02
 ETA7
+        0.00E+00  0.00E+00  0.00E+00  0.00E+00  0.00E+00  0.00E+00  1.00E-02

 SIGMA - COV MATRIX FOR RANDOM EFFECTS - EPSILONS  ****
         EPS1
 EPS1
+        1.00E+00

 OMEGA - CORR MATRIX FOR RANDOM EFFECTS - ETAS  *******
         ETA1      ETA2      ETA3      ETA4      ETA5      ETA6      ETA7
 ETA1
+        4.93E-01
 ETA2
+        0.00E+00  9.50E-01
 ETA3
+        0.00E+00  0.00E+00  0.00E+00
 ETA4
+        0.00E+00  0.00E+00  0.00E+00  4.94E-01
 ETA5
+        0.00E+00  0.00E+00  0.00E+00  0.00E+00  5.61E-01
 ETA6
+        0.00E+00  0.00E+00  0.00E+00  0.00E+00  0.00E+00  1.00E-01
 ETA7
+        0.00E+00  0.00E+00  0.00E+00  0.00E+00  0.00E+00  0.00E+00  1.00E-01

 SIGMA - CORR MATRIX FOR RANDOM EFFECTS - EPSILONS  ***
         EPS1
 EPS1
+        1.00E+00

 ********************                STOCHASTIC APPROXIMATION EXPECTATION-MAXIMIZATION               ********************
 ********************                          STANDARD ERROR OF ESTIMATE (S)                        ********************

 THETA - VECTOR OF FIXED EFFECTS PARAMETERS   *********
         TH 1      TH 2      TH 3      TH 4      TH 5      TH 6      TH 7      TH 8      TH 9      TH10      TH11      TH12
         8.59E-02  1.23E-01  1.30E-01  0.00E+00  6.30E-01  6.21E-03  1.23E-01  1.14E-01  1.45E-01  1.54E-01  1.51E-02  2.68E-02

 OMEGA - COV MATRIX FOR RANDOM EFFECTS - ETAS  ********
         ETA1      ETA2      ETA3      ETA4      ETA5      ETA6      ETA7
 ETA1
+        4.54E-02
 ETA2
+        0.00E+00  1.56E-01
 ETA3
+        0.00E+00  0.00E+00  0.00E+00
 ETA4
+        0.00E+00  0.00E+00  0.00E+00  5.72E-02
 ETA5
+        0.00E+00  0.00E+00  0.00E+00  0.00E+00  7.78E-02
 ETA6
+        0.00E+00  0.00E+00  0.00E+00  0.00E+00  0.00E+00  0.00E+00
 ETA7
+        0.00E+00  0.00E+00  0.00E+00  0.00E+00  0.00E+00  0.00E+00  0.00E+00

 SIGMA - COV MATRIX FOR RANDOM EFFECTS - EPSILONS  ****
         EPS1
 EPS1
+        0.00E+00

 OMEGA - CORR MATRIX FOR RANDOM EFFECTS - ETAS  *******
         ETA1      ETA2      ETA3      ETA4      ETA5      ETA6      ETA7
 ETA1
+        4.61E-02
 ETA2
+       .........  8.21E-02
 ETA3
+       ......... ......... .........
 ETA4
+       ......... ......... .........  5.79E-02
 ETA5
+       ......... ......... ......... .........  6.93E-02
 ETA6
+       ......... ......... ......... ......... ......... .........
 ETA7
+       ......... ......... ......... ......... ......... ......... .........

 SIGMA - CORR MATRIX FOR RANDOM EFFECTS - EPSILONS  ***
         EPS1
 EPS1
+       .........
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
 ********************                STOCHASTIC APPROXIMATION EXPECTATION-MAXIMIZATION               ********************
 ********************                    EIGENVALUES OF COR MATRIX OF ESTIMATE (S)                   ********************

             1         2         3         4         5         6         7         8         9        10        11        12
             13        14        15
         1.05E-01  2.06E-01  3.95E-01  4.00E-01  4.86E-01  5.16E-01  6.16E-01  8.12E-01  1.06E+00  1.17E+00  1.22E+00  1.49E+00
          1.58E+00  1.73E+00  3.21E+00
 #TBLN:      2
 #METH: Objective Function Evaluation by Importance Sampling
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
 #TERM:
 EXPECTATION ONLY PROCESS WAS NOT COMPLETED

 ETABAR IS THE ARITHMETIC MEAN OF THE ETA-ESTIMATES,
 AND THE P-VALUE IS GIVEN FOR THE NULL HYPOTHESIS THAT THE TRUE MEAN IS 0.

 ETABAR:         6.6809E-05 -4.4307E-03  0.0000E+00  7.1982E-04 -3.3817E-03  1.5160E-03  2.2782E-03
 SE:             4.9350E-02  9.3395E-02  0.0000E+00  4.0854E-02  4.5880E-02  8.7331E-03  4.7497E-03
 N:                      96          96           0          96          96          96          96

 P VAL.:         9.9892E-01  9.6216E-01  1.0000E+00  9.8594E-01  9.4124E-01  8.6218E-01  6.3148E-01

 ETASHRINKSD(%)  1.3563E+00  3.1758E+00  0.0000E+00  1.8530E+01  1.9458E+01  1.3984E+01  5.3218E+01
 ETASHRINKVR(%)  2.6942E+00  6.2506E+00  0.0000E+00  3.3627E+01  3.5130E+01  2.6013E+01  7.8115E+01
 EBVSHRINKSD(%)  1.3555E+00  3.4177E+00  0.0000E+00  1.7549E+01  1.8404E+01  4.5042E+01  5.0312E+01
 EBVSHRINKVR(%)  2.6926E+00  6.7186E+00  0.0000E+00  3.2018E+01  3.3420E+01  6.9796E+01  7.5311E+01
 RELATIVEINF(%)  0.0000E+00  0.0000E+00  0.0000E+00  6.7482E+01  6.2158E+01  2.9643E+01  2.3361E+01
 EPSSHRINKSD(%)  1.4715E+01
 EPSSHRINKVR(%)  2.7266E+01


 TOTAL DATA POINTS NORMALLY DISTRIBUTED (N):         1344
 N*LOG(2PI) CONSTANT TO OBJECTIVE FUNCTION:    2470.1067772541601
 OBJECTIVE FUNCTION VALUE WITHOUT CONSTANT:    14027.092219226732
 OBJECTIVE FUNCTION VALUE WITH CONSTANT:       16497.198996480893
 REPORTED OBJECTIVE FUNCTION DOES NOT CONTAIN CONSTANT

 TOTAL EFFECTIVE ETAS (NIND*NETA):                           576


 #TERE:
 Elapsed estimation  time in seconds:   136.27
 Elapsed covariance  time in seconds:   185.90

 ********************               OBJECTIVE FUNCTION EVALUATION BY IMPORTANCE SAMPLING             ********************
 #OBJT:**************                        FINAL VALUE OF OBJECTIVE FUNCTION                       ********************
 #OBJV:********************************************    14027.092       **************************************************

 ********************               OBJECTIVE FUNCTION EVALUATION BY IMPORTANCE SAMPLING             ********************
 ********************                             FINAL PARAMETER ESTIMATE                           ********************

 THETA - VECTOR OF FIXED EFFECTS PARAMETERS   *********
         TH 1      TH 2      TH 3      TH 4      TH 5      TH 6      TH 7      TH 8      TH 9      TH10      TH11      TH12
         3.15E+00  5.50E+00 -4.93E-01  0.00E+00  3.42E+00  2.17E-01  6.57E+00  4.23E+00 -6.06E-01 -7.47E-01 -1.02E+00  1.24E+00

 OMEGA - COV MATRIX FOR RANDOM EFFECTS - ETAS  ********
         ETA1      ETA2      ETA3      ETA4      ETA5      ETA6      ETA7
 ETA1
+        2.43E-01
 ETA2
+        0.00E+00  9.03E-01
 ETA3
+        0.00E+00  0.00E+00  0.00E+00
 ETA4
+        0.00E+00  0.00E+00  0.00E+00  2.44E-01
 ETA5
+        0.00E+00  0.00E+00  0.00E+00  0.00E+00  3.15E-01
 ETA6
+        0.00E+00  0.00E+00  0.00E+00  0.00E+00  0.00E+00  1.00E-02
 ETA7
+        0.00E+00  0.00E+00  0.00E+00  0.00E+00  0.00E+00  0.00E+00  1.00E-02

 SIGMA - COV MATRIX FOR RANDOM EFFECTS - EPSILONS  ****
         EPS1
 EPS1
+        1.00E+00

 OMEGA - CORR MATRIX FOR RANDOM EFFECTS - ETAS  *******
         ETA1      ETA2      ETA3      ETA4      ETA5      ETA6      ETA7
 ETA1
+        4.93E-01
 ETA2
+        0.00E+00  9.50E-01
 ETA3
+        0.00E+00  0.00E+00  0.00E+00
 ETA4
+        0.00E+00  0.00E+00  0.00E+00  4.94E-01
 ETA5
+        0.00E+00  0.00E+00  0.00E+00  0.00E+00  5.61E-01
 ETA6
+        0.00E+00  0.00E+00  0.00E+00  0.00E+00  0.00E+00  1.00E-01
 ETA7
+        0.00E+00  0.00E+00  0.00E+00  0.00E+00  0.00E+00  0.00E+00  1.00E-01

 SIGMA - CORR MATRIX FOR RANDOM EFFECTS - EPSILONS  ***
         EPS1
 EPS1
+        1.00E+00

 ********************               OBJECTIVE FUNCTION EVALUATION BY IMPORTANCE SAMPLING             ********************
 ********************                          STANDARD ERROR OF ESTIMATE (R)                        ********************

 THETA - VECTOR OF FIXED EFFECTS PARAMETERS   *********
         TH 1      TH 2      TH 3      TH 4      TH 5      TH 6      TH 7      TH 8      TH 9      TH10      TH11      TH12
         6.75E-02  1.06E-01  8.62E-02  0.00E+00  6.43E-01  5.48E-03  8.38E-02  9.76E-02  1.01E-01  1.14E-01  1.97E-02  2.19E-02

 OMEGA - COV MATRIX FOR RANDOM EFFECTS - ETAS  ********
         ETA1      ETA2      ETA3      ETA4      ETA5      ETA6      ETA7
 ETA1
+        3.95E-02
 ETA2
+        0.00E+00  1.48E-01
 ETA3
+        0.00E+00  0.00E+00  0.00E+00
 ETA4
+        0.00E+00  0.00E+00  0.00E+00  5.05E-02
 ETA5
+        0.00E+00  0.00E+00  0.00E+00  0.00E+00  6.76E-02
 ETA6
+        0.00E+00  0.00E+00  0.00E+00  0.00E+00  0.00E+00  0.00E+00
 ETA7
+        0.00E+00  0.00E+00  0.00E+00  0.00E+00  0.00E+00  0.00E+00  0.00E+00

 SIGMA - COV MATRIX FOR RANDOM EFFECTS - EPSILONS  ****
         EPS1
 EPS1
+        0.00E+00

 OMEGA - CORR MATRIX FOR RANDOM EFFECTS - ETAS  *******
         ETA1      ETA2      ETA3      ETA4      ETA5      ETA6      ETA7
 ETA1
+        4.00E-02
 ETA2
+       .........  7.79E-02
 ETA3
+       ......... ......... .........
 ETA4
+       ......... ......... .........  5.11E-02
 ETA5
+       ......... ......... ......... .........  6.03E-02
 ETA6
+       ......... ......... ......... ......... ......... .........
 ETA7
+       ......... ......... ......... ......... ......... ......... .........

 SIGMA - CORR MATRIX FOR RANDOM EFFECTS - EPSILONS  ***
         EPS1
 EPS1
+       .........
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
 ********************               OBJECTIVE FUNCTION EVALUATION BY IMPORTANCE SAMPLING             ********************
 ********************                    EIGENVALUES OF COR MATRIX OF ESTIMATE (R)                   ********************

             1         2         3         4         5         6         7         8         9        10        11        12
             13        14        15
         3.05E-01  3.25E-01  3.46E-01  6.79E-01  7.45E-01  7.70E-01  9.05E-01  1.01E+00  1.06E+00  1.11E+00  1.19E+00  1.39E+00
          1.63E+00  1.69E+00  1.84E+00
 Elapsed postprocess time in seconds:     0.00
 Elapsed finaloutput time in seconds:     0.00
 #CPUT: Total CPU Time in Seconds,      505.716
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